ORIGIN := 1
LI := 50
ll := 1 .. LI
lineas[51] := 4174
lineas[65] := 2210
# Número de líneas a elegir
lineas[ll] := 2544, 2557, 2568, 2613, 2684, 2716, 2783, 2791, 2830, 2889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
lineas[52] := 4324
lineas[66] := 2255
M := 40
lineas[53] := 4335
lineas[67] := 2263
i := 1 .. rows(M)
lineas[54] := 4342
# Número de capas
Nc := 1
cc := 1 .. Nc
lineas[68] := 2273
lineas[55] := 4415
lineas[69] := 2328
# Número de shots
Ns := 40
ii := 1 .. Ns
lineas[56] := 4463
lineas[57] := 4648
lineas[70] := 2361
n := 1 .. Nc*Ns
lineas[58] := 4957
lineas[71] := 2380
Ini := 0
lineas[59] := 5176
lineas[72] := 2425
lineas[77] := 1366
CU[n] := concat("/Data/Calibracion Zr2.5Nb - 4.53 J- 2.92us/ARG-2/", "A", num2str(n + Ini), ".txt")
lineas[73] := 2479
lineas[60] := 5213
lineas[78] := 1412
CU[40] = "/Data/Calibracion Zr2.5Nb - 4.53 J- 2.92us/ARG-2/A40.txt"
lineas[61] := 5262
lineas[74] := 1101
lineas[79] := 1437
lineas[62] := 5317
lineas[75] := 1106
Cu[n] := READPRN(CU[n])  # 2 ppm de H
lineas[63] := 2056
lineas[76] := 1322
lineas[80] := 1453
lineas[64] := 2108
MIn[ii, ll] := Cu[ii][lineas[ll], 2]
Viejo[n] := Cu[n]
rows(MIn) = 40
cols(MIn) = 50
v[ll] := sum(MIn[ii, ll]/rows(MIn), ii)
rows(lineas) = 80
M1m[ii, ll] := MIn[ii, ll]^-1  # matriz
lineas[1] = 2544
p := M1m*v/cols(M1m)  # vector
rows(p) = 40
Cu[ii] := Cu[ii]*p[ii]
rows(Cu) = 40
rows(Cu[1]) = 5924
Cu[1][1, 2] = 5.33277
cols(Cu) = 1
cols(Cu[1]) = 2
## Hidrógeno Beta
MIN := 5471
MAX := 5482
jj := MIN .. MAX
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# Hidrógeno Gama
MIN := 4624
MAX := 4633
jj := MIN .. MAX
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CU[n] := concat("d:\Coursera\Machine Learning Stanford\machine-learning-ex\Hidrogeno\Calibracion Zr2.5Nb - 4.53 J- 2.92us\ARG-6\", "A", num2str(n + Ini), ".txt")
Cu2[n] := READPRN(CU[n])  # error: Can't open the data file.  # 99 ppm de H
MIn[ii, ll] := Cu2[ii][lineas[ll], 2]
Viejo2[n] := Cu2[n]
v[ll] := sum(MIn[ii, ll]/rows(MIn), ii)
M1m[ii, ll] := MIn[ii, ll]^-1
p := M1m*v/cols(M1m)
Cu2[ii] := Cu2[ii]*p[ii]
# Hidrógeno Gama
MIN := 4624
MAX := 4633
jj := MIN .. MAX
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# Hidrógeno Beta
MIN := 5471
MAX := 5482
jj := MIN .. MAX
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CU[n] := concat("d:\Coursera\Machine Learning Stanford\machine-learning-ex\Hidrogeno\Calibracion Zr2.5Nb - 4.53 J- 2.92us\ARG-3\", "A", num2str(n + Ini), ".txt")
Cu3[n] := READPRN(CU[n])  # error: Can't open the data file.  # 42 ppm de H
MIn[ii, ll] := Cu3[ii][lineas[ll], 2]
v[ll] := sum(MIn[ii, ll]/rows(MIn), ii)
M1m[ii, ll] := MIn[ii, ll]^-1
p := M1m*v/cols(M1m)
Cu3[ii] := Cu3[ii]*p[ii]
# Hidrógeno Gama
MIN := 4624
MAX := 4633
jj := MIN .. MAX
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